Simulations: Version=92
  DataStore
  Experiment LnP
    Factors
      Permutation
        Factor Cro
          CompositeFactor Luc
            Specifications:
              [SlurpSowingRule].Script.SowingDate=2011-03-10
              [SlurpSowingRule].Script.CultivarName=Lucerne
              [SetCropVariables].Script.MaximumHeight = 600
              [SetCropVariables].Script.Cover = Lucerne
              [SetCropVariables].Script.Ext_coef = 0.8
              [SlurpSowingRule].Script.MaxG = 0.006
              [SlurpSowingRule].Script.R50 = 175
        Factor SKL
          CompositeFactor 01: Specifications=[Soil].Physical.SlurpSoil
            SoilCrop SlurpSoil
              LL=[0.1, 0.1, 0.09, 0.021, 0.036, 0.041, 0.043, 0.037, 0.052, 0.05, 0.05, 0.05, 0.05]
              KL=[0.01, 0.01, 0.01, 0.01, 0.01, 0.01, 0.01, 0.01, 0.01, 0.01, 0.01, 0.01, 0.01]
              XF=[1, 1, 1, 1, 1, 1, 1, 1, 1, 1, 1, 1, 1]
          CompositeFactor 03: Specifications=[Soil].Physical.SlurpSoil
            SoilCrop SlurpSoil
              LL=[0.1, 0.1, 0.09, 0.021, 0.036, 0.041, 0.043, 0.037, 0.052, 0.05, 0.05, 0.05, 0.05]
              KL=[0.03, 0.03, 0.03, 0.03, 0.03, 0.03, 0.03, 0.03, 0.03, 0.03, 0.03, 0.03, 0.03]
              XF=[1, 1, 1, 1, 1, 1, 1, 1, 1, 1, 1, 1, 1]
          CompositeFactor 05: Specifications=[Soil].Physical.SlurpSoil
            SoilCrop SlurpSoil
              LL=[0.1, 0.1, 0.09, 0.021, 0.036, 0.041, 0.043, 0.037, 0.052, 0.05, 0.05, 0.05, 0.05]
              KL=[0.05, 0.05, 0.05, 0.05, 0.05, 0.05, 0.05, 0.05, 0.05, 0.05, 0.05, 0.05, 0.05]
              XF=[1, 1, 1, 1, 1, 1, 1, 1, 1, 1, 1, 1, 1]
          CompositeFactor 07: Specifications=[Soil].Physical.SlurpSoil
            SoilCrop SlurpSoil
              LL=[0.1, 0.1, 0.09, 0.021, 0.036, 0.041, 0.043, 0.037, 0.052, 0.05, 0.05, 0.05, 0.05]
              KL=[0.07, 0.07, 0.07, 0.07, 0.07, 0.07, 0.07, 0.07, 0.07, 0.07, 0.07, 0.07, 0.07]
              XF=[1, 1, 1, 1, 1, 1, 1, 1, 1, 1, 1, 1, 1]
          CompositeFactor 09: Specifications=[Soil].Physical.SlurpSoil
            SoilCrop SlurpSoil
              LL=[0.1, 0.1, 0.09, 0.021, 0.036, 0.041, 0.043, 0.037, 0.052, 0.05, 0.05, 0.05, 0.05]
              KL=[0.09, 0.09, 0.09, 0.09, 0.09, 0.09, 0.09, 0.09, 0.09, 0.09, 0.09, 0.09, 0.09]
              XF=[1, 1, 1, 1, 1, 1, 1, 1, 1, 1, 1, 1, 1]
          CompositeFactor 11: Specifications=[Soil].Physical.SlurpSoil
            SoilCrop SlurpSoil
              LL=[0.1, 0.1, 0.09, 0.021, 0.036, 0.041, 0.043, 0.037, 0.052, 0.05, 0.05, 0.05, 0.05]
              KL=[0.11, 0.11, 0.11, 0.11, 0.11, 0.11, 0.11, 0.11, 0.11, 0.11, 0.11, 0.11, 0.11]
              XF=[1, 1, 1, 1, 1, 1, 1, 1, 1, 1, 1, 1, 1]
        Factor KLR
          Specification=[SlurpSowingRule].Script.KLReductionFactor = 0.0005,00.001,00.002,00.003,00.005,000.01
        Factor RFV: Specification=[SlurpSowingRule].Script.RFV = 10,15,20,25,30,35
    Simulation LandPBase
      Weather: FileName=%root%\Examples\WeatherFiles\lincoln.met
      Clock: Start=2011-03-01; End=2014-05-01
      Summary
      SoilArbitrator Soil Arbitrator
      Zone Field: Area=1; Slope=0; AspectAngle=0; Altitude=50
        Folder ManagerFolder
          Manager ReportOnDates
            TodayString =
```csharp
using APSIM.Shared.Utilities;
using System.Xml.Serialization;
using Models;
using Models.PMF;
using Models.Soils;
using System.Text;
using System.Collections.Generic;
using Models.Core;
using System;

namespace Models
{
    [Serializable] 
    public class Script : Model
    {
        [Link] Clock Clock;
        [Link] Models.Report DataRep;
        
        public List<string> ObsDates;
        public string TodayString { get; set; }
        
        [EventSubscribe("StartOfSimulation")]
        private void OnStartOfSimulation(object sender, EventArgs e)
        {
            ObsDates = new List<string>();
            ObsDates.Add("2011-06-09");
            ObsDates.Add("2011-10-06");
            ObsDates.Add("2011-10-20");
            ObsDates.Add("2011-10-26");
            ObsDates.Add("2011-11-03");
            ObsDates.Add("2011-11-12");
            ObsDates.Add("2011-11-17");
            ObsDates.Add("2011-11-30");
            ObsDates.Add("2011-12-14");
            ObsDates.Add("2011-12-28");
            ObsDates.Add("2012-01-11");
            ObsDates.Add("2012-01-25");
            ObsDates.Add("2012-02-08");
            ObsDates.Add("2012-02-22");
            ObsDates.Add("2012-03-07");
            ObsDates.Add("2012-03-21");
            ObsDates.Add("2012-04-04");
            ObsDates.Add("2012-04-18");
            ObsDates.Add("2012-05-02");
            ObsDates.Add("2012-05-16");
            ObsDates.Add("2012-05-30");
            ObsDates.Add("2012-06-13");
            ObsDates.Add("2012-08-06");
            ObsDates.Add("2012-08-29");
            ObsDates.Add("2012-09-13");
            ObsDates.Add("2012-09-26");
            ObsDates.Add("2012-10-10");
            ObsDates.Add("2012-10-24");
            ObsDates.Add("2012-11-08");
            ObsDates.Add("2012-11-21");
            ObsDates.Add("2012-12-05");
            ObsDates.Add("2012-12-19");
            ObsDates.Add("2013-01-04");
            ObsDates.Add("2013-01-16");
            ObsDates.Add("2013-01-30");
            ObsDates.Add("2013-02-13");
            ObsDates.Add("2013-02-27");
            ObsDates.Add("2013-03-13");
            ObsDates.Add("2013-03-27");
            ObsDates.Add("2013-04-10");
            ObsDates.Add("2013-04-23");
            ObsDates.Add("2013-05-08");
            ObsDates.Add("2013-06-26");
            ObsDates.Add("2013-08-27");
            ObsDates.Add("2013-09-12");
            ObsDates.Add("2013-10-01");
            ObsDates.Add("2013-10-14");
            ObsDates.Add("2013-10-30");
            ObsDates.Add("2013-11-12");
            ObsDates.Add("2013-11-26");
            ObsDates.Add("2013-12-10");
            ObsDates.Add("2013-12-24");
            ObsDates.Add("2014-01-07");
            ObsDates.Add("2014-01-21");
            ObsDates.Add("2014-02-04");
            ObsDates.Add("2014-02-18");
            ObsDates.Add("2014-03-26");
            ObsDates.Add("2014-04-15");
        }
        
        [EventSubscribe("DoReport")]
        private void OnDoReport(object sender, EventArgs e)
        {
            TodayString = Clock.Today.ToString("yyyy-MM-dd");
            if (ObsDates.Contains(TodayString))
                DataRep.DoOutput();
        }

    }
}
```
          Manager SlurpSowingRule
            SowingDate = 03/14/2011 00:00:00
            CultivarName = Lucerne
            MaxG = 0.006
            R50 = 100
            KLReductionFactor = -0.002
            RFV = 10
            InitialRootDepth = 15
            RootDepth = 2000
            KLReductionDepth = 150
            YKLModifiers =
            XDepth =
```csharp
using Models.Soils;
using APSIM.Shared.Utilities;
using Models.PMF;
using Models.Core;
using System;
        
namespace Models
{
    [Serializable] 
    [System.Xml.Serialization.XmlInclude(typeof(Model))]
    public class Script : Model
    {
        [Link] Plant Slurp;
        [Link] Clock Clock;
        [Link] Soil Soil;
        [Link] Zone zone;
        
        [Description("Cultivar")]
        public string CultivarName { get; set; }
        [Description("Initial Root Depth")]
        public double InitialRootDepth { get; set; }
        [Description("Sowing Date")]
        public DateTime SowingDate { get; set; }
        [Description("Maximum Root Depth")]
        public double RootDepth { get; set; }
        [Description("Roof Front Velocity")]
        public double RFV { get; set; }
        [Description("Factor to change Kl modifier with Depth")]
        public double KLReductionFactor { get; set; }
        [Description("Depth that KL starts to decline")]
        public double KLReductionDepth { get; set; }
        
        public double[] YKLModifiers { get; set; }
        public double[] XDepth { get; set; }
        private double Depth { get; set; }
        
        [Description("Maximum Stomatal Conductance")]
        public double MaxG { get; set; }
        [Description("Stomatal Radn response")]
        public double R50 { get; set; }
        
        [EventSubscribe("DoManagement")]
        private void OnDoManagement(object sender, EventArgs e)
        {
            if (Clock.Today.Date == SowingDate)
            {
                Slurp.Sow(cultivar: CultivarName, population: 1, depth: InitialRootDepth, rowSpacing: 150);
                
                YKLModifiers = new double[Soil.Thickness.Length];
                XDepth = new double[Soil.Thickness.Length];
                Depth = 0;
                for (int layer = 0; layer < Soil.Thickness.Length; layer++)
                {
                    Depth += Soil.Thickness[layer] / 2;  //Add half of the thickness of the current layer so depth is the mid depth of that layer
                    if (Depth <= KLReductionDepth)
                    {
                        YKLModifiers[layer] = 1;
                        XDepth[layer] = Depth;
                    }
                    else
                    {
                        double KLMod = 1 * Math.Exp(-KLReductionFactor * (Depth - KLReductionDepth));
                        YKLModifiers[layer] = KLMod;
                        XDepth[layer] = Depth;
                    }
                    Depth += Soil.Thickness[layer] / 2;  //Add the other half of the current layer so depth is the top of the next layer
                }
                object KLMods = YKLModifiers;
                zone.Set("Slurp.Root.KLModifier.XYPairs.Y", KLMods);
                object Depths = XDepth;
                zone.Set("Slurp.Root.KLModifier.XYPairs.X", Depths);
                object RD = RootDepth;
                zone.Set("Slurp.Root.MaximumRootDepth.FixedValue", RD);
                object RV = RFV;
                zone.Set("Slurp.Root.RootFrontVelocity.Potential.FixedValue", RV);
                object GMaxValue = MaxG;
                zone.Set("Slurp.Leaf.Gsmax", GMaxValue); 
                object R50Value = R50; 
                zone.Set("Slurp.Leaf.R50", R50Value); 
                
            }
        }
    }
}
```
          Manager SetCropVariables
            MaximumHeight = 600
            Cover =
            Ext_coef = 0.8
            CoverFile = %root%\Tests\Validation\Slurp\ShallowSoilTest\CoverInterpolated.csv
            Irrigation =
            Treatment =
            leaflai = 0
```csharp
using Models.Soils;
using System.Data;
using APSIM.Shared.Utilities;
using System.Xml.Serialization;
using Models;
using Models.PMF;
using System.Text;
using System.Collections.Generic;
using Models.Core;
using System;
namespace Models
{
    [Serializable] 
    //[System.Xml.Serialization.XmlInclude(typeof(Model))]
    public class Script : Model
    {
        [Link] Plant SCUM;
        [Link] Clock Clock;
        [Link] Zone zone;
        [Link] Simulation Simulation;
        [Link] Soil Soil;
        
        [Description("File of Light interception and Extinction coefficient")]
        public string CoverFile { get; set; }
        [Description("Extinction coefficient (if constant).")]
        public double Ext_coef { get; set; }
        [Description("Maximum height of the crop at full cover")]
        public double MaximumHeight { get; set; }
        
        [XmlIgnore] private DataTable Covers { get; set; }
        [Description("Column name for the fractional light interception")]
        public string Cover { get; set; }
        public string Irrigation { get; set; }
        public string Treatment { get; set; }
        
        private double CoverRead { get; set; }
        public double leaflai { get; private set; }
                
        [EventSubscribe("StartOfSimulation")]
        private void OnStartOfSimulation(object sender, EventArgs e)
        {
            
            Treatment = Cover;
            
            string fullFileName = PathUtilities.GetAbsolutePath(CoverFile, Simulation.FileName);
            
            ApsimTextFile textFile = new ApsimTextFile();
            textFile.Open(fullFileName);
            Covers = textFile.ToTable();
            textFile.Close();
        }
        
        [EventSubscribe("StartOfDay")]
        private void OnStartOfDay(object sender, EventArgs e)
        {
            foreach (DataRow row in Covers.Rows)
            {
                DateTime TodayDate = Convert.ToDateTime(row["Date"]);
                if (TodayDate.Date == Clock.Today.Date)
                {
                    CoverRead = Convert.ToDouble(row[Treatment]);
                }
            }
        
            if ((bool)zone.Get("Slurp.IsAlive") == true)
            {
                //Only assign cover valuse if crop is emerged
                
                if (CoverRead == 1)
                    leaflai = Math.Log(0.01) / -Ext_coef;
                else
                {
                    if (CoverRead > 0)
                        leaflai = Math.Log(1 - CoverRead) / -Ext_coef;
                    else
                        leaflai = 0;
                }
                //Summary.WriteMessage(this, "LAI " + leaflai);
                object LAIResetValue = leaflai;
                zone.Set("Slurp.Leaf.Area.FixedValue", LAIResetValue);  
                object HeightResetValue = CoverRead * MaximumHeight;
                zone.Set("Slurp.Leaf.Tallness.FixedValue", HeightResetValue);  
            }
            
            /*if ((Clock.Today.DayOfYear == 160) && (Clock.Today.Year == 2011))
                Soil.SoilWater.Reset();
                */
        }
        /*[EventSubscribe("StartOfDay")]
        private void OnEndOfDay(object sender, EventArgs e)
        {
            if ((Clock.Today.DayOfYear == 66) && (Clock.Today.Year == 2012) && (Irrigation == "Rain"))
            {
                if (Cover == "Lucerne")
                {
                    double[] ValuesToSet = { 0.18, 0.21, 0.20, 0.06, 0.05, 0.06, 0.07, 0.08, 0.10, 0.14, 0.14, 0.14, 0.14 };
                    Soil.SoilWater.SW = ValuesToSet;
                }
                if (Cover == "Ryegrass")
                {
                    double[] ValuesToSet = { 0.14, 0.20, 0.25, 0.11, 0.07, 0.08, 0.09, 0.09, 0.11, 0.14, 0.14, 0.14, 0.14 };
                    Soil.SoilWater.SW = ValuesToSet;
                }
            }
        }*/
    }
}
```
        Soil: Latitude=0; Longitude=0
          Chemical
            Thickness  NO3N     NH4N  PH
            100        180.833  0     6.6
            200        12.5     0     6.2
            300        1.38889  0     5.7
            300        1.38889  0     5.5
            300        0        0     5.5
            300        0        0     5.5
          Physical
            Thickness  BD   AirDry  LL15   DUL    SAT
            150        1.2  0.05    0.1    0.29   0.46
            150        1.2  0.1     0.1    0.28   0.46
            100        1.2  0.09    0.09   0.35   0.48
            200        1.2  0.021   0.021  0.145  0.32
            200        1.2  0.036   0.036  0.1    0.24
            200        1.2  0.041   0.041  0.1    0.24
            200        1.2  0.043   0.043  0.11   0.25
            200        1.2  0.037   0.037  0.12   0.26
            200        1.2  0.052   0.052  0.14   0.27
            200        1.2  0.05    0.05   0.14   0.27
            200        1.2  0.05    0.05   0.14   0.27
            200        1.2  0.05    0.05   0.14   0.27
            400        1.2  0.05    0.05   0.14   0.27
            SoilCrop SlurpSoil
              LL=[0.1, 0.1, 0.09, 0.021, 0.036, 0.041, 0.043, 0.037, 0.052, 0.05, 0.05, 0.05, 0.05]
              KL=[0.06, 0.06, 0.06, 0.06, 0.06, 0.06, 0.06, 0.06, 0.06, 0.06, 0.06, 0.06, 0.06]
              XF=[1, 1, 1, 1, 1, 1, 1, 1, 1, 1, 1, 1, 1]
          WaterBalance SoilWater: SummerDate=1-Nov; SummerU=9; SummerCona=4.4; WinterDate=1-Apr; WinterU=9; WinterCona=4.4; DiffusConst=0; DiffusSlope=0; Salb=0.18; CN2Bare=68; CNRed=20; CNCov=0.8; Slope=0; DischargeWidth=0; CatchmentArea=0
            Thickness  SWCON  KLAT
            150        0.7    0
            150        0.7    0
            100        0.95   0
            200        0.95   0
            200        0.95   0
            200        0.95   0
            200        0.95   0
            200        0.95   0
            200        0.95   0
            200        0.95   0
            200        0.95   0
            200        0.95   0
            400        0.95   0
          SoilNitrogen: fom_types=[default, manure, mucuna, lablab, shemp, stable]; fract_carb=[0.2, 0.3, 0.54, 0.57, 0.45, 0]; fract_cell=[0.7, 0.3, 0.37, 0.37, 0.47, 0.1]; fract_lign=[0.1, 0.4, 0.09, 0.06, 0.08, 0.9]
            SoilNitrogenNO3 NO3
            SoilNitrogenNH4 NH4
            SoilNitrogenUrea Urea
            SoilNitrogenPlantAvailableNO3 PlantAvailableNO3
            SoilNitrogenPlantAvailableNH4 PlantAvailableNH4
          Organic: FOMCNRatio=30
            Thickness  Carbon  SoilCNRatio  FBiom  FInert  FOM
            100        1.82    11.5         0.025  0.3     1243.93
            200        1.47    11.5         0.025  0.4     833.832
            300        1.2     11.5         0.015  0.75    457.617
            300        1.03    11.5         0.01   0.9     251.145
            300        0.47    11.5         0.01   0.96    137.831
            300        0.47    11.5         0.01   0.96    75.6435
          Sample Initial nitrogen: Thickness=[100, 200, 300, 300, 300, 300]; SWUnits=Volumetric; OCUnits=Total; PHUnits=Water
          Sample Initial water: SWUnits=Volumetric; OCUnits=Total; PHUnits=Water
            Thickness=[150, 150, 100, 200, 200, 200, 200, 200, 200, 200, 200, 200, 400]
            SW=[0.32, 0.32, 0.32, 0.166, 0.102, 0.105, 0.115, 0.117, 0.126, 0.126, 0.126, 0.126, 0.126]
          CERESSoilTemperature
        Plant Slurp: CropType=Slurp
        MicroClimate: a_interception=0; b_interception=1; c_interception=0; d_interception=0; soil_albedo=0.23; SoilHeatFluxFraction=0.4; MinimumHeightDiffForNewLayer=0; NightInterceptionFraction=0.5; ReferenceHeight=2
        Irrigation
        Fertiliser
        SurfaceOrganicMatter surface organic matter: InitialResidueName=wheat; InitialResidueType=wheat; InitialResidueMass=2000; InitialStandingFraction=0; InitialCPR=0; InitialCNR=80
        Report
          VariableNames:
            [Clock].Today as Date
            [Soil].SoilWater.SW[1:9] as SW
            [Slurp].Root.Depth as RootDepth
            [Slurp].Leaf.CoverTotal as cover
            [Slurp].Leaf.LAI as LAI
            [Slurp].Leaf.Height as Height
            sum([Soil].SoilWater.SWmm[1:9]) as PSWC
        Report SummaryNumbers: EventNames=[Clock].EndOfSimulation
          VariableNames:
            [Clock].Today as Date
            [SlurpSowingRule].Script.CultivarName as CropNameCheck
            [SlurpSowingRule].Script.KLReductionFactor as KLRCheck
            [SlurpSowingRule].Script.RootDepth as RDpCheck
            [SlurpSowingRule].Script.RFV as RFVCheck
            [SlurpSowingRule].Script.YKLModifiers as KLmodCheck
            [SlurpSowingRule].Script.XDepth as KLdepCheck
            [SetCropVariables].Script.Irrigation as IrrigationCheck
            [SetCropVariables].Script.Cover as CoverCheck
